# Te-dependent SNAP Au potential with ttm coupling (final boss)

# Initialize simulation
variable nrep equal 4
variable a equal 4.078
units    metal

# Generate the box and atom positions using a FCC lattice
variable nx equal ${nrep}
variable ny equal ${nrep}
variable nz equal ${nrep}

boundary        p p p
lattice         fcc $a
region          box block 0 ${nx} 0 ${ny} 0 ${nz}
create_box      1 box
create_atoms    1 box
mass            1 196.967

# TTM with electronic temperature read out of an external grid (see python script)
#fix	     twotemp all ttm 342785 1.2470e-5 0.087614 0.0005365 29.5917 47.5679 58.4613 11 11 11 infile dir.inputs/ttm_grid.in

# TTM with constant electronic temperature (in K)
variable init_et_eV equal 1.0
variable conv_K_to_eV equal 8.61732814974056e-5
variable init_et equal ${init_et_eV}/${conv_K_to_eV}

fix	       twotemp all ttm 342785 1.2470e-5 0.087614 0.0005365 29.5917 47.5679 58.4613 11 11 11 set ${init_et}

# ZBL parameters
variable zblcutinner equal 2.0
variable zblcutouter equal 3.5
variable zblz equal 79

pair_style hybrid/overlay zbl ${zblcutinner} ${zblcutouter} snap_ttm
pair_coeff 1 1 zbl ${zblz} ${zblz}
pair_coeff * * snap_ttm dir.inputs/Au.snapcoeff dir.inputs/Au.snapparam dir.inputs/Au.snapbetas Au f_twotemp


run 1 pre yes post no
reset_timestep 0

# Setup output
thermo          1
thermo_style    custom step temp pe ke etotal press f_twotemp[1] f_twotemp[2]
thermo_modify 	format float "%20.16g"
thermo_modify 	norm yes

# Set up NVE run
timestep     1.0e-3
neighbor     2.0 bin
neigh_modify every 5 delay 0 check yes

# Setting variables for output
compute      total_te all reduce sum f_twotemp
variable     avg_Te equal c_total_te/atoms

compute	     epotatom  all pe/atom
compute	     ekinatom  all ke/atom

variable     total_pe equal pe
variable     avg_pe   equal pe/atoms

variable     total_ke equal ke
variable     avg_ke   equal ke/atoms

variable     total_e  equal etotal
variable     avg_e    equal etotal/atoms

variable     avg_Ti equal temp
variable     pstime equal dt*step

variable     sxx equal pxx
variable     syy equal pyy
variable     szz equal pzz
variable     avg_press equal (v_sxx+v_syy+v_szz)/3.

# Dumping for ovito
#dump	       10 all custom 1 dir.dumps/dump.*.snap_ttm id x y z f_twotemp

velocity  all create 600.0 3423 dist gaussian

# We like the .csv file better than the LAMMPS log file
fix 	       extra all print 10 "${pstime} ${avg_Ti} ${avg_Te} ${avg_e} ${avg_pe} ${avg_ke} ${total_e} ${total_pe} ${total_ke} ${avg_press}" file thermo_global_ttm_coupling_${init_et_eV}.dat screen no

fix 	       nveall all nve
run          10000
